OpenVSP model (file version 5), 7 components.
Geometry view with OpenVSP parameter names; values to 6 digits, angles in degrees, lengths in the model's unit.
Overall bounding box: X_Min=0 X_Len=20.4 Y_Min=-7.18352 Y_Len=14.367 Z_Min=-2.1875 Z_Len=4.375

Fuselage "FrontFuselage"
  location (X Y Z) 0 0 0, rotation 0 0 0
  bounding box size 6 5.00056 4.375
  Design: Length=6
  cross sections:
    n  XLocPercent  YLocPercent  ZLocPercent  shape
    0  0            0            -0.07        point
    1  0.679348     0            0            super ellipse Super_Height=4.375 Super_M=2 Super_MaxWidthLoc=-0.55 Super_N=2 Super_Width=5
    2  1            0            0            as above

Conformal "CabinConform", child of "FrontFuselage"
  location (X Y Z) 0 0 0, rotation 0 0 0
  bounding box size 2.7418 4.41684 3.58149
  Design: ChordTrimFlag=0 ChordTrimMax=0.9 ChordTrimMin=0.1 Offset=0.15 UTrimFlag=1 UTrimMax=0.4 UTrimMin=0.13 V1TrimBegin=0.1 V1TrimEnd=0.4 V1TrimFlag=1 V2TrimBegin=0.25 V2TrimEnd=0.75 V2TrimFlag=0

Custom "SeatGroup", child of "CabinConform"
  location (X Y Z) 1.2 -0.55 -0.25, rotation 0 35 0
  bounding box size 1.52416 1.6 0.847036
  Design: BackAngle=25 BackHeight=1 BackThick=0.1 SeatHeight=0.35 SeatLength=0.5 Width=0.5
  Layout: AisleWidth=1 NumLeft=2 NumMiddle=0 NumRight=0 NumRow=1 SeatGap=0.6 SeatPitch=1
  custom script SeatGroup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

Custom "PodMan", child of "SeatGroup"
  location (X Y Z) 2.66649 -0.55 0.188085, rotation -180 30 -180; relative location 0.95 0 1.2, rotation 0 115 0
  bounding box size 1.65884 0.673143 0.859912
  Design: ElbowAngle=65 Height=1.9 HipAngle=65 KneeAngle=-90 PresetTrigger=0 Presets=1 ShoulderAngle=0
  custom script PodMan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

Fuselage "RearFuselage"
  location (X Y Z) 6 0 0, rotation 0 0 0
  bounding box size 14.4 5.00056 4.375
  Design: Length=14.4
  cross sections:
    n  XLocPercent  YLocPercent  ZLocPercent  shape
    0  0            0            0            super ellipse Super_Height=4.375 Super_M=2 Super_MaxWidthLoc=-0.55 Super_N=2 Super_Width=5
    1  0.99         0            0            as above
    2  1            0            0            point

Stack "FuelTanksCombined", child of "RearFuselage"
  location (X Y Z) 7 0 0, rotation 0 0 0; relative location 1 0 0, rotation 0 0 0
  bounding box size 10 4 4
  cross sections:
    n  XDelta  YDelta  ZDelta  shape
    0  0       0       0       circle Circle_Diameter=4
    1  8       0       0       as above

Wing "Wing", child of "RearFuselage"
  location (X Y Z) 8.4 2.25 -1.31739, rotation 10 0 0; relative location 2.4 2.25 -1.31739, rotation 10 0 0
  symmetric about XZ
  bounding box size 11.5531 14.367 1.19075
  mass: Density=1 Shell_Flag=1 Mass_Area=1 Mass_Prior=0
  totals: TotalSpan=10 TotalProjectedSpan=10 TotalChord=6 TotalArea=60 TotalAR=1.66667
  root: chord 10.9091, twist 0, NACA 4-series Camber=0 CamberLoc=0.2 ThickChord=0.05
  sections:
    n  Span  Root_Chord  Tip_Chord  Area  Sweep  Sweep_Location  Dihedral  Twist  Twist_Location  tip airfoil
    1  5     10.9091     1.09091    30    48     0.5             0         0      0.25            NACA 4-series Camber=0 CamberLoc=0.2 ThickChord=0.1

Parameter links (A drives B)
  FuelTanksCombined:XSec_0:Circle_Diameter -> FuelTanksCombined:XSec_1:Circle_Diameter Offset=0
  FrontFuselage:XSec_1:Super_Width -> FrontFuselage:XSec_2:Super_Width Offset=0
  FrontFuselage:XSec_1:Super_Height -> FrontFuselage:XSec_2:Super_Height Offset=0
  FrontFuselage:XSec_1:Super_Width -> FrontFuselage:XSec_1:Super_Height Scale=0.875
  FrontFuselage:XSec_1:Super_Width -> RearFuselage:XSec_1:Super_Width
  FrontFuselage:XSec_1:Super_Width -> RearFuselage:XSec_0:Super_Width
  FrontFuselage:XSec_1:Super_Height -> RearFuselage:XSec_0:Super_Height
  FrontFuselage:XSec_1:Super_Height -> RearFuselage:XSec_1:Super_Height
  FrontFuselage:XSec_1:Super_Width -> FuelTanksCombined:XSec_0:Circle_Diameter Scale=0.8
  FrontFuselage:XSec_1:Super_Width -> Wing:XForm:Y_Rel_Location Scale=0.45
