OpenVSP model (file version 5), 8 components.
Geometry view with OpenVSP parameter names; values to 6 digits, angles in degrees, lengths in the model's unit.
Overall bounding box: X_Min=0 X_Len=20.6603 Y_Min=-7.69141 Y_Len=15.3828 Z_Min=-1.38024 Z_Len=2.68024

Fuselage "FrontFuselage"
  location (X Y Z) 0 0 0, rotation 0 0 0
  bounding box size 7 6.2 2.68024
  Design: Length=7
  cross sections:
    n  XLocPercent  YLocPercent  ZLocPercent  shape
    0  0            0            -0.1         point
    1  0.55         0            0            super ellipse Super_Height=2.6 Super_M=2 Super_MaxWidthLoc=-0.55 Super_N=2 Super_Width=3
    2  1            0            0            general fuselage BotStr=1.4 BotTanAngle=90 CornerRad=0 Height=2.5 LowStr=0.83 MaxWidthLoc=0 TopStr=1.49 TopTanAngle=90 UpStr=0.83 Width=6.2

Conformal "CabinConform", child of "FrontFuselage"
  location (X Y Z) 0 0 0, rotation 0 0 0
  bounding box size 2.81211 2.89917 1.91969
  Design: ChordTrimFlag=0 ChordTrimMax=0.9 ChordTrimMin=0.1 Offset=0.05 UTrimFlag=1 UTrimMax=0.4 UTrimMin=0.13 V1TrimBegin=0 V1TrimEnd=0.5 V1TrimFlag=1 V2TrimBegin=0.25 V2TrimEnd=0.75 V2TrimFlag=0

Custom "SeatGroup", child of "CabinConform"
  location (X Y Z) 1.1 -0.55 0, rotation 0 40.9524 0
  bounding box size 1.56506 1.6 0.732069
  Design: BackAngle=25 BackHeight=1 BackThick=0.1 SeatHeight=0.35 SeatLength=0.5 Width=0.5
  Layout: AisleWidth=1 NumLeft=2 NumMiddle=0 NumRight=0 NumRow=1 SeatGap=0.6 SeatPitch=1
  custom script SeatGroup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

Custom "PodMan", child of "SeatGroup"
  location (X Y Z) 2.60401 -0.55 0.283646, rotation -180 24.0476 -180; relative location 0.95 0 1.2, rotation 0 115 0
  bounding box size 1.70694 0.673143 0.777985
  Design: ElbowAngle=65 Height=1.9 HipAngle=65 KneeAngle=-90 PresetTrigger=0 Presets=1 ShoulderAngle=0
  custom script PodMan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

Fuselage "RearFuselage"
  location (X Y Z) 7 0 0, rotation 0 0 0
  bounding box size 12 6.2 2.5
  Design: Length=12
  cross sections:
    n  XLocPercent  YLocPercent  ZLocPercent  shape
    0  0            0            0            general fuselage BotStr=1.4 BotTanAngle=90 CornerRad=0 Height=2.5 LowStr=0.83 MaxWidthLoc=0 TopStr=1.49 TopTanAngle=90 UpStr=0.83 Width=6.2
    1  0.99         0            0            as above
    2  1            0            0            point

Stack "FuelTank", child of "RearFuselage"
  location (X Y Z) 7.5 0 0.05, rotation 0 0 0; relative location 0.5 0 0.05, rotation 0 0 0
  bounding box size 6 2 2
  cross sections:
    n  XDelta  YDelta  ZDelta  shape
    0  0       0       0       circle Circle_Diameter=2
    1  5       0       0       as above

Wing "WingGeom", child of "RearFuselage"
  location (X Y Z) 10 2.75 -0.6, rotation 10 0 0; relative location 3 2.75 -0.6, rotation 10 0 0
  symmetric about XZ
  bounding box size 10.6603 15.3828 1.18851
  mass: Density=1 Shell_Flag=1 Mass_Area=1 Mass_Prior=0
  totals: TotalSpan=10 TotalProjectedSpan=10 TotalChord=5.5 TotalArea=55 TotalAR=1.81818
  root: chord 9, twist 0, NACA 4-series Camber=0 CamberLoc=0.2 ThickChord=0.05
  sections:
    n  Span  Root_Chord  Tip_Chord  Area  Sweep  Sweep_Location  Dihedral  Twist  Twist_Location  tip airfoil
    1  5     9           2          27.5  60     0               0         0      0.25            NACA 4-series Camber=0 CamberLoc=0.2 ThickChord=0.1

Stack "OxTank1", child of "RearFuselage"
  location (X Y Z) 7.5 2 0.05, rotation 0 0 0; relative location 0.5 2 0.05, rotation 0 0 0
  symmetric about XZ
  bounding box size 6 6 2
  cross sections:
    n  XDelta  YDelta  ZDelta  shape
    0  0       0       0       circle Circle_Diameter=2
    1  5       0       0       as above

Parameter links (A drives B)
  FrontFuselage:Design:Length -> RearFuselage:XForm:X_Rel_Location Offset=0
  RearFuselage:Design:Length -> WingGeom:XForm:X_Rel_Location Offset=-9
